l := 5.5
f1 := 4.8
q := 0.058
h := 3
f2 := 0.8
q1 := 0.009
w := 6.5
f := f1 + f2 = 5.6
l*w = 35.75
qвп := 0.44
t1 := 31
R := 344
qвр := 0.119
c := 0.53
t2 := 23
k1 := 0.6
n1 := 16
k2 := 0.95
n := 6
N := 0.06
eламп := 0.5
q11 := (qвп + qвр)*k1*k2 = 0.31863
q12 := qвр*k1*k2 = 0.06783
Qо := (q11*f1 + q12*f2)*c + (t1 - t2)/R*f = 0.969587
Qогр := (l*h - f)*q + (2*h*w + 2*l*w + l*h)*q1 = 1.7752
Qэ := 0.3*0.35*n*0.95 + 0.3*0.4*2*0.2 + 0.3*0.55*1*1 + eламп*N*n1*1 = 1.2915
Qл := 0.13*n*0.95 = 0.741
Q := Qо + Qогр + Qэ + Qл = 4.77729
