l := 4
f1 := 3.8
q := 0.058
f2 := 0
q1 := 0.009
w := 3
f := f1 + f2 = 3.8
h := 2.5
l*w = 12
qвп := 0.44
t1 := 31
R := 344
qвр := 0.119
c := 0.9
t2 := 23
k1 := 0.72
n1 := 4
k2 := 0.95
n := 2
N := 0.1
eламп := 0.95
q11 := (qвп + qвр)*k1*k2 = 0.382356
q12 := qвр*k1*k2 = 0.081396
q11*f1*c = 1.30766
Qо := (q11*f1 + q12*f2)*c + (t1 - t2)/R*f = 1.39603
Qогр := (l*h - f)*q + (2*h*w + 2*l*w + l*h)*q1 = 0.8006
Qэ := 0.3*0.35*n*0.95 + 0.3*0.4*2*0.2 + 0.3*0.55*1*1 + eламп*N*n1*1 = 0.7925
Qл := 0.13*n*0.95 = 0.247
Q := Qо + Qогр + Qэ + Qл = 3.23613
