ф1 := 0.335
ф6 := 1.555
ф2 := 1.05
ф7 := 4.55
ф3 := 3.225
ф8 := 3.25
ф4 := 3.72
ф9 := 2.6
ф5 := 2.005
ф10 := 0.225
Сф := ф1 + ф2 + ф3 + ф5 + ф6 + ф7 + ф8 + ф9 + ф10 = 18.795
НВ := 327.6
Ксл := 1
Срф := 0.7
Кн := 1
ГС := 2
ТЗ := 0.11*НВ*Ксл*Кн = 36.036
Пэо := 3.5
ЭП := 0.09*НВ*Ксл*Кн = 29.484
Пэр := 11.5
ТП := 0.11*НВ*Ксл*Кн = 36.036
Фном := 1974
РП := 0.55*НВ*Срф*Ксл*Кн = 126.126
Фэо := Фном*(1 - Пэо/100) = 1904.91
ВН := 0.14*НВ*Ксл*Кн = 45.864
Фэр := Фном*(1 - Пэр/100) = 1746.99
Сумм := ТЗ + ЭП + ТП + РП + ВН = 273.546
Ср := Сумм/(1*20.56*8) = 1.6631
