C := 27000
Окр := 10000
Сраз := 11.8
W := 0.35
Кн := 34.2
Спи := 24  # срок полезного использования - 24 месяца
Ки := 0.7
Цэ := 2.53
Ппот := 4
Fном := 1974
Fэфоб := 1904.91
Кр := 6
Ксм := 1
Кнр := 22
Ноб := 1/Спи*100 = 4.16667
Кмз := 7
Зм := C*Кмз/100 = 1890
Расчет материальных затрат
Зэ := Fном*Цэ*W*Ки*Ксм = 1223.58
Расчет затрат на электроэнергию
ФОТ := Сраз*Ксм*Окр = 118000  # Расчет оплаты труда
Отч := ФОТ*Кн/100 = 40356
Расчет отчислений от заработной платы
Зр := C*Кр/100 = 1620
Расчет затрат на ремонт
Зн := (ФОТ + Зм + Отч + Зр + Зэ)*Кнр/100 = 35879.7
Расчет накладных расходов
Аоб := C*Ноб*Сраз/100 = 13275  # Расчет амортизационных отчислений- на оборудование
Сумм := Зм + Зэ + ФОТ + Зр + Отч + Зн + Аоб = 212244
Счмв := Сумм/(Fэфоб*Ксм) = 111.42
