Цтс := 27000 = 27000
Зтр := 0.05*Цтс = 1350
Зм := 0.08*Цтс = 2160
Цпо := 2000
Зрд := 800
Ззащита := 500
Кр := (Цтс + Зтр + Зм + Цпо) = 32510
Uпост := 46000
Uперем := 0.05*Uпост + Зрд + Ззащита = 3600
Uполн := Uпост + Uперем = 49600
Uприбыль := Uполн*0.15 = 7440
В := Uполн + Uприбыль = 57040
N := 16
Цед := В/N = 3565
