Цтс := 27000
Зтр := 0.05*Цтс = 1350
Зм := 0.08*Цтс = 2160
Цпо := 2000
Зрд := 800
Ззащ := 500
Кр := Цтс + Зтр + Зм + Цпо = 32510
Ипост := 46000
Ипер := 0.05*Ипост + Зрд + Ззащ = 3600
Иполн := Ипост + Ипер = 49600
Иприбыль := 0.15*Иполн = 7440
В := Иполн + Иприбыль = 57040
N := 10
Цед := В/N = 5704
