Цед := 5990.43
N16 := 0
N17 := 10
N18 := 8
N19 := 6
N20 := 4
Р16 := Цед*N16 = 0
Р17 := Цед*N17 = 59904.3
Р18 := Цед*N18 = 47923.4
Р19 := Цед*N19 = 35942.6
Р20 := Цед*N20 = 23961.7
К16 := 33010
К17 := 0
К18 := 0
К19 := 0
К20 := 0
И16 := 0
И17 := 49920.21
И18 := И17*0.5 = 24960.1
И19 := И17*0.3 = 14976.1
И20 := И17*0.4 = 19968.1
ЧДП16 := Р16 - (К16 + И16) = -33010
ЧДП17 := Р17 - (К17 + И17) = 9984.09
ЧДП18 := Р18 - (К18 + И18) = 22963.3
ЧДП19 := Р19 - (К19 + И19) = 20966.5
ЧДП20 := Р20 - (К20 + И20) = 3993.64
Е := 0.12
А := К16/5 = 6602
а1 := 1
ЧДДП16 := ЧДП16*а1 = -33010
П1 := Р16 - И16 = 0
ЭИ16 := -К16 = -33010
а2 := 1/(1 + Е)^2 = 0.797194
ЧДДП17 := ЧДП17*а2 = 7959.26
П2 := Р17 - И17 - А/4 = 8333.59
ЭИ17 := ЭИ16 + ЧДДП17 = -25050.7
а3 := 1/(1 + Е)^3 = 0.71178
ЧДДП18 := ЧДП18*а3 = 16344.8
П3 := Р18 - И18 - А/4 = 21312.8
ЭИ18 := ЭИ17 + ЧДДП18 = -8705.9
а4 := 1/(1 + Е)^4 = 0.635518
ЧДДП19 := ЧДП19*а4 = 13324.6
П4 := Р19 - И19 - А/4 = 19316
ЭИ19 := ЭИ18 + ЧДДП19 = 4618.7
а5 := 1/(1 + Е)^5 = 0.567427
ЧДДП20 := ЧДП20*а5 = 2266.1
П5 := Р20 - И20 - А/4 = 2343.14
ЭИ20 := ЭИ19 + ЧДДП20 = 6884.8
